# System Specifications | Conversions
FSR := 1.5 V
dB(x) := 1/10^(x/20)*V/V
ppm := 1/1000000
T_ambient := 25 C
T_max := 125 C
ΔT := T_max - T_ambient = 100 C
V_s_buf := 3.0 V
V_s_spec := 3.3 V
# Resistor Divider Errors
# Accuracy | Resistor Specifications
α_res_tol := 0.1 %
E_res_tol := α_res_tol = 1000 ppm
δ_res_drift := 5*ppm/C
E_res_drift := ΔT*δ_res_drift = 500 ppm  # Drift
# Buffer Amplifier Errors
# Buffer Specifications
V_os_max := 0.25 mV
# Accuracy
V_os_PSRR := dB(93) = 22.3872 μV/V
E_buf_Vos := V_os_max/FSR = 166.667 ppm
V_os_drift := 0.5*μV/C
E_buf_PSRR := (V_s_spec - V_s_buf)*V_os_PSRR/FSR = 4.47744 ppm
# Drift
E_buf_drift_Vos := V_os_drift/FSR*ΔT = 33.3333 ppm
# Reference Errors
# Reference Specifications
# Accuracy
α_REF_output := 0.1 %
E_REF_output := α_REF_output = 1000 ppm
# Drift
δ_REF_drift_output := 3*ppm/C
E_REF_drift := 165 C*δ_REF_drift_output = 495 ppm
# Alternate System Error
# Vref Accuracy
E_accuracy_vref := E_REF_output = 1000 ppm
# Vref Drift
E_drift_vref := E_REF_drift = 495 ppm
# Vref Total
E_total_vref_RSS := sqrt(E_accuracy_vref^2 + E_drift_vref^2) = 1115.81 ppm
E_total_vref := E_accuracy_vref + E_drift_vref = 1495 ppm
# Vbias Accuracy
E_accuracy_vbias_RSS := sqrt(E_res_tol^2 + E_buf_Vos^2 + E_buf_PSRR^2 + E_REF_output^2) = 1424.01 ppm
E_accuracy_vbias_total := E_res_tol + E_buf_Vos + E_buf_PSRR + E_REF_output = 2171.14 ppm
# Vbias Drift
E_drift_vbias_RSS := sqrt(E_res_drift^2 + E_buf_drift_Vos^2 + E_REF_drift^2) = 704.369 ppm
E_drift_vbias_total := E_res_drift + E_buf_drift_Vos + E_REF_drift = 1028.33 ppm
# Vbias Total
E_total_vbias_RSS := sqrt(E_total_vref_RSS^2 + E_accuracy_vbias_RSS^2 + E_drift_vbias_RSS^2) = 1941.38 ppm
E_total_vbias := E_accuracy_vbias_total + E_drift_vbias_total = 3199.48 ppm
# Matching
α_matching := sqrt(α_res_tol^2 + (V_os_max/FSR)^2) = 0.00101379
α_matching = 1013.79 ppm
# Tracking
δ_tracking_total := δ_res_drift + V_os_drift/FSR = 5.33333 ppm
δ_tracking_RSS := sqrt(δ_res_drift^2 + (V_os_drift/FSR)^2) = 5.0111 ppm
