# System Specifications | Conversions
R_shunt := 10*10^-3*Ω
dB(x) := 1/10^(x/20)*V/V
I_load_max := 2.5 A
I_load_min := -2.5 A
ppm := 1/1000000
V_shunt_max := R_shunt*I_load_max = 0.025 V
V_shunt_min := R_shunt*I_load_min = -0.025 V
FSR := V_shunt_max - V_shunt_min = 0.05 V
T_ambient := 25 C
T_max := 125 C
ΔT := T_max - T_ambient = 100 C
# Shunt Resistor Errors
# Accuracy | Shunt Specifications
α_shunt_tol := 0.1 %
E_shunt_tol := α_shunt_tol = 1000 ppm
# Drift
δ_shunt_drift := 15*ppm/C
E_shunt_drift := ΔT*δ_shunt_drift = 1500 ppm
# INA213 Errors
# INA Accuracy Specifications
V_os_INA := 5*μV
V_s_INA_spec := 5 V
V_s_INA_sys := 3 V
V_os_INA_PSRR := 0.1*μV/V
α_INA_GE := 0.02 %
V_cm_INA_spec := 12 V
V_cm_sys := 0 V
V_os_INA_CMRR := dB(120) = 1 μV/V
# Accuracy
E_INA_Vos := V_os_INA/FSR = 100 ppm
E_INA_PSRR := (V_s_INA_spec - V_s_INA_sys)*V_os_INA_PSRR/FSR = 4 ppm
E_INA_GE := α_INA_GE = 200 ppm
E_INA_CMRR := (V_cm_INA_spec - V_cm_sys)*V_os_INA_CMRR/FSR = 240 ppm
# Drift | INA Drift Specifications
δ_INA_drift_GE := 3*ppm/C
E_INA_drift_GE := ΔT*δ_INA_drift_GE = 300 ppm
V_os_INA_drift := 0.1*μV/C
E_INA_drift_Vos := V_os_INA_drift/FSR*ΔT = 200 ppm
# REF2030 Errors
# Accuracy | REF Accuracy Specifications
α_REF_output := 0.05 %
E_REF_output := α_REF_output = 500 ppm
# Drift | REF Drift Specifications
δ_REF_drift_output := 3*ppm/C
E_REF_drift := (165 C)*δ_REF_drift_output = 495 ppm
# System Error
# Accuracy
E_accuracy_RSS := sqrt(E_REF_output^2 + E_INA_CMRR^2 + E_INA_GE^2 + E_INA_PSRR^2 + E_INA_Vos^2 + E_shunt_tol^2) = 1165.17 ppm
E_accuracy_total := E_REF_output + E_INA_CMRR + E_INA_GE + E_INA_PSRR + E_INA_Vos + E_shunt_tol = 2044 ppm
# Drift
E_drift_RSS := sqrt(E_REF_drift^2 + E_INA_drift_Vos^2 + E_INA_drift_GE^2 + E_shunt_drift^2) = 1620.19 ppm
E_drift_total := E_REF_drift + E_INA_drift_Vos + E_INA_drift_GE + E_shunt_drift = 2495 ppm
# Total
E_total_RSS := sqrt(E_accuracy_RSS^2 + E_drift_RSS^2) = 1995.66 ppm
E_total := E_accuracy_total + E_drift_total = 4539 ppm
# System Errors as Percentages
E_accuracy_RSS = 0.116517 %
E_accuracy_total = 0.2044 %
E_drift_RSS = 0.162019 %
E_drift_total = 0.2495 %
E_total_RSS = 0.199566 %
E_total = 0.4539 %
